// SBML level 2 version 3

function Constant_flux__irreversible(v)
  v;
end
Constant_flux__irreversible is "Constant flux (irreversible)";

model ProteinActivation()
  // Whole Cell 2015 - Protein Activation

  // Compartments:
  compartment default = 1;

  // Species:
  species $MG_101_MONOMER in default = 10;
  species $MG_127_MONOMER in default = 10;
  species $RIBOSOME_30S in default = 10;
  species $RIBOSOME_50S in default = 10;
  species $MG_085_HEXAMER in default = 10;
  species $MG_203_204_TETRAMER in default = 10;
  species $MG_205_DIMER in default = 10;
  species $MG_236_MONOMER in default = 10;
  species $MG_409_DIMER in default = 10;
  species $G6P in default = 10;
  species $PI in default = 0;
  species $DNA_GYRASE in default = 0;
  species $ciprofloxacin in default = 0;
  species $difloxacin in default = 0;
  species $sparfloxacin in default = 0;
  species $gentamicin in default = 0;
  species $spectinomycin in default = 0;
  species $streptomycin in default = 0;
  species $tetracycline in default = 0;
  species $azithromycin in default = 0;
  species $chloramphenicol in default = 0;
  species $clarithromycin in default = 0;
  species $clindamycin in default = 0;
  species $erythromycin in default = 0;
  species $lincomycin in default = 0;
  species $pristinamycin in default = 0;
  species $MG_085_HEXAMER__inactive in default = 5;
  species $MG_127_MONOMER__inactive in default = 5;
  species $MG_236_MONOMER__inactive in default = 5;
  species $MG_203_204_TETRAMER__inactive in default = 5;
  species $RIBOSOME_30S__inactive in default = 5;
  species $RIBOSOME_50S__inactive in default = 5;
  species $DNA_GYRASE__inactive in default = 5;
  species $MG_409_DIMER__inactive in default = 5;
  species $MG_205_DIMER__inactive in default = 5;
  species $MG_101_MONOMER__inactive in default = 5;
  species dummy in default = 0;

  // Parameters:
  stimulus_gluconate = 0;
  stimulus_thiolStress = 0;
  temperature = 45;
  stimulus_ironStress = 0;
  start = 0;
  Initial_for_G6P = G6P;
  Initial_for_PI = PI;
  Initial_for_azithromycin = azithromycin;
  Initial_for_chloramphenicol = chloramphenicol;
  Initial_for_ciprofloxacin = ciprofloxacin;
  Initial_for_clarithromycin = clarithromycin;
  Initial_for_clindamycin = clindamycin;
  Initial_for_difloxacin = difloxacin;
  Initial_for_erythromycin = erythromycin;
  Initial_for_gentamicin = gentamicin;
  Initial_for_lincomycin = lincomycin;
  Initial_for_pristinamycin = pristinamycin;
  Initial_for_sparfloxacin = sparfloxacin;
  Initial_for_spectinomycin = spectinomycin;
  Initial_for_streptomycin = streptomycin;
  Initial_for_tetracycline = tetracycline;
  Initial_for_stimulus_ironStress = stimulus_ironStress;
  Initial_for_stimulus_thiolStress = stimulus_thiolStress;
  Initial_for_temperature = temperature;

  // Reactions:
  dummy_reaction: => dummy; default*Constant_flux__irreversible(v);
    v = 10;

  // Events:
  event_MG_101: at ((stimulus_gluconate > 0) && (start > 0)): MG_101_MONOMER__inactive = MG_101_MONOMER*default + MG_101_MONOMER__inactive*default, MG_101_MONOMER = 0;
  event_MG_101_2: at ((stimulus_gluconate <= 0) && (start > 0)): MG_101_MONOMER = MG_101_MONOMER__inactive*default + MG_101_MONOMER*default, MG_101_MONOMER__inactive = 0;
  event_DNA_GYRASE: at ((((Initial_for_ciprofloxacin > 0) || (Initial_for_difloxacin > 0)) || (Initial_for_sparfloxacin > 0)) && (start > 0)): DNA_GYRASE__inactive = DNA_GYRASE__inactive*default + DNA_GYRASE*default, DNA_GYRASE = 0;
  event_DNA_GYRASE_2: at ((((Initial_for_ciprofloxacin <= 0) && (Initial_for_difloxacin <= 0)) && (Initial_for_sparfloxacin <= 0)) && (start > 0)): DNA_GYRASE = DNA_GYRASE__inactive*default + DNA_GYRASE*default, DNA_GYRASE__inactive = 0;
  event_MG_085: at ((Initial_for_G6P > 5) && (start > 0)): MG_085_HEXAMER = MG_085_HEXAMER__inactive*default + MG_085_HEXAMER*default, MG_085_HEXAMER__inactive = 0;
  event_MG_085_2: at ((Initial_for_G6P <= 5) && (start > 0)): MG_085_HEXAMER__inactive = MG_085_HEXAMER*default + MG_085_HEXAMER__inactive*default, MG_085_HEXAMER = 0;
  event_MG_127: at ((Initial_for_stimulus_thiolStress > 0) && (start > 0)): MG_127_MONOMER = MG_127_MONOMER__inactive*default + MG_127_MONOMER*default, MG_127_MONOMER__inactive = 0;
  event_MG_127_2: at ((Initial_for_stimulus_thiolStress <= 0) && (start > 0)): MG_127_MONOMER__inactive = MG_127_MONOMER__inactive*default + MG_127_MONOMER*default, MG_127_MONOMER = 0;
  event_MG_203_204: at ((((Initial_for_ciprofloxacin <= 0) && (Initial_for_difloxacin <= 0)) && (Initial_for_sparfloxacin <= 0)) && (start > 0)): MG_203_204_TETRAMER = MG_203_204_TETRAMER*default + MG_203_204_TETRAMER__inactive*default, MG_203_204_TETRAMER__inactive = 0;
  event_MG_203_204_2: at ((((Initial_for_ciprofloxacin > 0) || (Initial_for_difloxacin > 0)) || (Initial_for_sparfloxacin > 0)) && (start > 0)): MG_203_204_TETRAMER__inactive = MG_203_204_TETRAMER__inactive*default + MG_203_204_TETRAMER*default, MG_203_204_TETRAMER = 0;
  event_MG_205: at ((Initial_for_temperature >= 43) && (start > 0)): MG_205_DIMER = MG_205_DIMER__inactive*default + MG_205_DIMER*default, MG_205_DIMER__inactive = 0;
  event_MG_205_2: at ((Initial_for_temperature < 43) && (start > 0)): MG_205_DIMER__inactive = MG_205_DIMER*default + MG_205_DIMER__inactive*default, MG_205_DIMER = 0;
  event_MG_236: at ((Initial_for_stimulus_ironStress > 0) && (start > 0)): MG_236_MONOMER = MG_236_MONOMER__inactive*default + MG_236_MONOMER*default, MG_236_MONOMER__inactive = 0;
  event_MG_236_2: at ((Initial_for_stimulus_ironStress <= 0) && (start > 0)): MG_236_MONOMER__inactive = MG_236_MONOMER*default + MG_236_MONOMER__inactive*default, MG_236_MONOMER = 0;
  event_MG_409: at ((Initial_for_PI > 20) && (start > 0)): MG_409_DIMER = MG_409_DIMER__inactive*default + MG_409_DIMER*default, MG_409_DIMER__inactive = 0;
  event_MG_409_2: at ((Initial_for_PI <= 20) && (start > 0)): MG_409_DIMER__inactive = MG_409_DIMER__inactive*default + MG_409_DIMER*default, MG_409_DIMER = 0;
  event_RIBOSOME_30S: at (((((Initial_for_gentamicin <= 0) && (Initial_for_spectinomycin <= 0)) && (Initial_for_streptomycin <= 0)) && (Initial_for_tetracycline <= 0)) && (start > 0)): RIBOSOME_30S = RIBOSOME_30S__inactive*default + RIBOSOME_30S*default, RIBOSOME_30S__inactive = 0;
  event_RIBOSOME_30S_2: at (((((Initial_for_gentamicin > 0) || (Initial_for_spectinomycin > 0)) || (Initial_for_streptomycin > 0)) || (Initial_for_tetracycline > 0)) && (start > 0)): RIBOSOME_30S__inactive = RIBOSOME_30S*default + RIBOSOME_30S__inactive*default, RIBOSOME_30S = 0;
  event_RIBOSOME_50S: at ((((((((Initial_for_azithromycin <= 0) && (Initial_for_chloramphenicol <= 0)) && (Initial_for_clarithromycin <= 0)) && (Initial_for_clindamycin <= 0)) && (Initial_for_erythromycin <= 0)) && (Initial_for_lincomycin <= 0)) && (Initial_for_pristinamycin <= 0)) && (start > 0)): RIBOSOME_50S = RIBOSOME_50S__inactive*default + RIBOSOME_50S*default, RIBOSOME_50S__inactive = 0;
  event_RIBOSOME_50S_2: at ((((((((Initial_for_azithromycin > 0) || (Initial_for_chloramphenicol > 0)) || (Initial_for_clarithromycin > 0)) || (Initial_for_clindamycin > 0)) || (Initial_for_erythromycin > 0)) || (Initial_for_lincomycin > 0)) || (Initial_for_pristinamycin > 0)) && (start > 0)): RIBOSOME_50S__inactive = RIBOSOME_50S__inactive*default + RIBOSOME_50S*default, RIBOSOME_50S = 0;
  event_dummy: at (dummy*default > 3): start = 1;

  // Unit definitions:
  unit substance = item;
end
