// SBML level 2 version 4

model New_Model()
  // dummy definition

  // Compartments:
  compartment compartment = 1;

  // Species:
  species $MG_001_MONOMER in compartment = 10;
  species $MG_238_MONOMER in compartment = 1;
  species $MG_001_MONOMER__UNFOLDED in compartment = 10;
  species $MG_238_MONOMER__UNFOLDED in compartment = 5;
  species MG_001_MONOMER_0 in compartment = 6.02214179e20;

  // Reactions:
  re1: $MG_001_MONOMER__UNFOLDED => MG_001_MONOMER_0; compartment*k1*MG_001_MONOMER__UNFOLDED;  // modifiers: MG_238_MONOMER
    k1 = 0.1;

  // Unit definitions:
  unit volume = 1e-3 litre;
  unit substance = item;
end
