// SBML level 2 version 4

function MIN(a, b)
  piecewise(a, a <= b, b);
end

model Protein_folding_second_test()

  // Compartments:
  compartment compartment = 100;

  // Species:
  species A in compartment = 0;
  species chaperone1 in compartment = 1;
  species B in compartment = 0;
  species B_un in compartment = 1;
  species X in compartment = 1;
  species A_un in compartment = 1;

  // Parameters:
  Initial_for_A_un = A_un;
  Initial_for_B_un = B_un;
  Initial_for_X = X;
  Initial_for_chaperone1 = chaperone1;

  // Assignment rules:
  r1 := MIN(Initial_for_A_un, MIN(Initial_for_X, Initial_for_chaperone1));
  r2 := MIN(Initial_for_B_un, MIN(Initial_for_X/2, Initial_for_chaperone1));

  // Reactions:
  reaction_2: B_un + 2 X => B; compartment*r2*B_un*X^2;
  reaction_1: A_un + X => A; compartment*r1*A_un*X;

  // Unit definitions:
  unit substance = item;
end
