// SBML level 2 version 4

function RUNIFORM(a, b)
  (a + b)/2;
end

model New_Model()

  // Compartments:
  compartment compartment = 1;

  // Species:
  species A_UNFOLDED in compartment = 1;
  species A in compartment = 1;
  species chaperone1 in compartment = 1;
  species prosthetic in compartment = 1;

  // Parameters:
  GR = RUNIFORM(0, 1);
  GC = piecewise(1, GR < 0.25, piecewise(2, GR < 0.5, piecewise(3, GR < 0.75, 4)));
  Initial_for_GC = GC;

  // Assignment rules:
  R1_COND := piecewise(1, (Initial_for_GC == 1) && (chaperone1*compartment > 0), 0);

  // Reactions:
  R1: A_UNFOLDED + 2 prosthetic => A; compartment*R1_COND*A_UNFOLDED*prosthetic^2;

  // Unit definitions:
  unit substance = item;
end
